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/batch
! ANSYS input file written by Workbench version 2025 R1
! File used for geometry attach: C:\Users\ASUS\Downloads\material springs TA.stp
/title,aqil paling bener--Static Structural (A5)
/COM,/COM,     ANSYSMotion, 2025.1
/com,--- Data in consistent NMM units. See Solving Units in the help system for more information.
/units,MPA
/prep7
! Turn off shape checking because checks already performed inside WB mesher.
! See help system for more information.
SHPP,OFF,,NOWARN
etcon,set             ! allow ANSYS to choose best KEYOP's for 180x elements, resets any applicable keyopt to MAPDL defaults
/com,*********** Nodes for the whole assembly ***********
nblock,3,,18101
(1i9,3e20.9e3)
        1    -1.056894508E+02    -4.870863266E+00     1.897218062E+01
        2    -1.117627708E+02    -4.528107737E+00     2.006239604E+01
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-1
/com,*********** Elements for Body 1 'material springs TA|Solid1' ***********
et,1,186
keyo,1,2,1          ! set full integration on SOLID186
eblock,19,solid,,3113
(19i9)
        1        1        1        1        0        0        0        0       20        0        1        1        4        8        7     2264     2261     2257     2258
     4546     4559     4572     4547    11896    11887    11885    11890     4549     4561     4577     4574
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-1
/com,*********** Send User Defined Coordinate System(s) ***********
csys,0
toffst,273.15,      ! Temperature offset from absolute zero
/com,*********** Set Reference Temperature ***********
tref,22.
/com,*********** Send Materials ***********
Temperature = 'TEMP' ! Temperature
MP,DENS,1,8e-09,	! tonne mm^-3
MP,C,1,434000000,	! mm^2 s^-2 C^-1
MP,KXX,1,60.5,	! tonne mm s^-3 C^-1
MP,RSVX,1,0.00017,	! ohm mm
MP,EX,1,207000,	! tonne s^-2 mm^-1
MP,NUXY,1,0.33,
MP,MURX,1,10000,

!************************* Model Summary ********************
!material springs TA|Solid1,	Structural Steel,	matid,	1
!************************* End Model Summary ********************
/com,*********** Fixed Supports ***********
CMBLOCK,_FIXEDSU,NODE,       42
(8i10)
      2265      2266      2267      2268      2269      2270      2271      2272
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cmsel,s,_FIXEDSU
d,all,all
nsel,all
/com,*********** Define Force Without Surface Effect Elements "Force" ***********
local,12,0,0.,0.,0.,0.,0.,0.
csys,0
CMBLOCK,_CM32_3 ,ELEM,       36
(8i10)
       285       286       287       288       289       290       291       292
       293       294       295       296       297       298       299       300
       301       302       303       304       305       306       307       308
       309       310       311       312       313       314       315       316
       317       318       319       567
CMBLOCK,_CM32_4 ,ELEM,       36
(8i10)
       284       568       569       570       571       572       573       574
       575       576       577       578       579       580       581       582
       583       584       585       586       587       588       589       590
       591       592       593       594       595       596       597       598
       599       600       601       602
fini
/com,****************************************************************************
/com,*************************    SOLUTION       ********************************
/com,****************************************************************************
/com,******************** SOLUTION ********************
/solu
antype,static           ! Static analysis
allsel,all              ! Select all nodes/elements
csys,0                  ! Gunakan global koordinat (FY = global Y)

/com,===== Tambahan Beban Pegas =====
F,12327,FY,108155
F,3453,FY,108155
F,2711,FY,108155
F,14982,FY,108155
F,13917,FY,108155
F,4195,FY,108155
F,13392,FY,108155
F,3950,FY,108155

/com,===== Pengaturan Solver dari Workbench =====
eqsl,pcg,1e-8,,,,,1
cntr,print,1
cncheck,dmp
dmoption,emat,no
dmoption,esav,no
nldiag,cont,iter
rescontrol,,none

/com,===== Load Step Controls (otomatis WB) =====
sfe,_CM32_3,3,pres,1,0.
sfe,_CM32_4,4,pres,1,0.
sfe,_CM32_3,3,pres,1,6.06764599299656
sfe,_CM32_4,4,pres,1,6.06764599299656
sfe,_CM32_3,3,pres,1,0.
sfe,_CM32_4,4,pres,1,0.
nsel,all
esel,all
sfco,none
nsub,1,1,1
time,1

/com,===== Solve Command =====
solve
finish
/com,****************************************************
/com,******************* SOLVE FOR LS 1 OF 1 ****************
/com,*********** Set Force Without Surface Effect Elements "Force" ***********
sfco,1,0,12,,,,,1   ! set and send X component values
sfe,_CM32_3,3,pres,1,0.
sfe,_CM32_4,4,pres,1,0.
sfco,1,1,12,,,,,1   ! set and send Y component values
sfe,_CM32_3,3,pres,1,6.06764599299656
sfe,_CM32_4,4,pres,1,6.06764599299656
sfco,1,2,12,,,,,1   ! set and send Z component values
sfe,_CM32_3,3,pres,1,0.
sfe,_CM32_4,4,pres,1,0.
nsel,all
esel,all
sfco,none		! resets the sfcontrol
nsub,1,1,1
time,1.
outres,erase
outres,all,none
outres,nsol,all,
outres,rsol,all
outres,eangl,all
outres,etmp,all
outres,veng,all
outres,strs,all,
outres,epel,all,
outres,eppl,all,
outres,cont,all,
! *********** WB SOLVE COMMAND ***********
! check interactive state
*get,ANSINTER_,active,,int
*if,ANSINTER_,ne,0,then
/eof
*endif
solve
/com *************** Write FE CONNECTORS *********
CEWRITE,file,ce,,INTE
/com,****************************************************
/com,*************** FINISHED SOLVE FOR LS 1 *************
*get,_NSOLTHREADS,active,0,ntfs
*get,_NSOLPROCESSES,active,0,npfs
*get,_PCGITER,active,,solu,cgiter
/post1
fini
